<?xml version="1.0" ?>
<!-- CasTest2
Nous tirons de chaque côté avec une force équivalente-->

<Node name="root" dt="0.05" showBoundingTree="0" gravity="0 0 0">
    <RequiredPlugin name="SofaOpenglVisual"/>
    <RequiredPlugin name='SofaMiscFem'/>
    <RequiredPlugin name='SofaGeneralDeformable'/>
    <RequiredPlugin name='SofaImplicitOdeSolver'/>
	<RequiredPlugin pluginName='SofaEngine'/>
	<RequiredPlugin pluginName='SofaMeshCollision'/>
	<RequiredPlugin pluginName='SofaBoundaryCondition'/>

	<RequiredPlugin name='tearing'/>

    <VisualStyle displayFlags="showVisual showBehaviorModels" />
    <DefaultPipeline verbose="0" />
    <BruteForceDetection name="N2" />
    <DefaultContactManager response="PenalityContactForceField" />
    <MinProximityIntersection name="Proximity" alarmDistance="0.8" contactDistance="0.5" />


    <Node name="SquareGravity">
        <EulerImplicitSolver name="cg_odesolver" printLog="false"  rayleighStiffness="0.1" rayleighMass="0.1" />
        <CGLinearSolver iterations="25" name="linear solver" tolerance="1.0e-9" threshold="1.0e-9" />
        <MeshGmshLoader name="meshLoader" filename="mesh/square3.msh" scale="10" createSubelements="true" />

		<TriangleSetTopologyContainer  name="Container" src="@meshLoader" fileTopology="" tags=" " />
		<TriangleSetTopologyModifier   name="Modifier" />
		<TriangleSetGeometryAlgorithms name="GeomAlgo"   template="Vec3d" />

        <MechanicalObject name="Mo"/>
        <DiagonalMass massDensity="0.15" />


		<!--Modification de la fixed constraint pour y mettre une Box constraint-->
		<!--FixedConstraint indices="0 1" /-->
		<BoxROI template="Vec3d" name="PulledSide1" box="-0.1 9.9 0.1 10.1 10.1 -0.1" drawBoxes="1"/>
		<ConstantForceField name="CFF1" indices="@PulledSide1.indices" force="0 100 0" showArrowSize=".01" />

		<BoxROI template="Vec3d" name="PulledSide2" box="-0.1 0.1 0.1  10.1 -0.1 -0.1" drawBoxes="1"/>
		<ConstantForceField name="CFF2" indices="@PulledSide2.indices" force="0 -100 0" showArrowSize=".01" />

		<TearingEngine name="TearingEngine" input_position="@Mo.position" scenario="4"/>
		<TriangularFEMForceField name="FEM" youngModulus="60" poissonRatio="0.3" method="large" computePrincipalStress="true"/>
        <TriangularBendingSprings name="FEM-Bend" stiffness="300" damping="1.0" />
        <TriangleCollisionModel />


        <Node >
            <OglModel name="Visual" color="red" />
            <IdentityMapping input="@.." output="@Visual" />
        </Node>
    </Node>
</Node>
